*Heading
** Job name: Job-4 Model name: weave2D
** Generated by: Abaqus/CAE 6.13-3
*Preprint, echo=NO, model=NO, history=NO, contact=NO
**
** PARTS
**
*Part, name=inclusionP3
*Node
      1,           0.,  0.457078159,           0.
      2,           0., -0.457078159,           0.
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*Element, type=C3D4
   1,  954,  955,  956,  957
   2,  958,  366,  959,  358
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*Nset, nset=Matrix_section
    1,    2,    3,    4,    5,    6
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*Elset, elset=Matrix_section, generate
 3853,  9091,     1
*Nset, nset=Inclusion_section
    1,    2,   11,   12,   13,   14
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*Elset, elset=Inclusion_section, generate
    1,  3852,     1
** Section: Inclusion_section
*Solid Section, elset=Inclusion_section, material=MAT1
,
** Section: Matrix_section
*Solid Section, elset=Matrix_section, material=MAT0
,
*End Part
**
**
** ASSEMBLY
**
*Assembly, name=Assembly
**
*Instance, name=inclusionP3-1, part=inclusionP3
*End Instance
**
** Constraint: Eqn-1
*Equation
3
MASTERNODE5, 3, 1.
MASTERNODE1, 3, -1.
CONSTRAINTSDRIVER2, 1, -0.22
** Constraint: Eqn-2
*Equation
3
MASTERNODE6, 3, 1.
MASTERNODE1, 3, -1.
CONSTRAINTSDRIVER2, 1, -0.22
** Constraint: Eqn-3
*Equation
3
MASTERNODE7, 3, 1.
MASTERNODE1, 3, -1.
CONSTRAINTSDRIVER2, 1, -0.22
** Constraint: Eqn-4
*Equation
3
MASTERNODE8, 3, 1.
MASTERNODE1, 3, -1.
CONSTRAINTSDRIVER2, 1, -0.22
** Constraint: Eqn-5
*Equation
2
MASTERNODE2, 3, 1.
MASTERNODE1, 3, -1.
** Constraint: Eqn-6
*Equation
2
MASTERNODE3, 3, 1.
MASTERNODE1, 3, -1.
** Constraint: Eqn-7
*Equation
2
MASTERNODE4, 3, 1.
MASTERNODE1, 3, -1.
** Constraint: Eqn-8
*Equation
3
MASTERNODE5, 2, 1.
MASTERNODE1, 2, -1.
CONSTRAINTSDRIVER5, 1, -0.22
** Constraint: Eqn-9
*Equation
3
MASTERNODE6, 2, 1.
MASTERNODE1, 2, -1.
CONSTRAINTSDRIVER5, 1, -0.22
** Constraint: Eqn-10
*Equation
4
MASTERNODE7, 2, 1.
MASTERNODE1, 2, -1.
CONSTRAINTSDRIVER1, 1, -2.
CONSTRAINTSDRIVER5, 1, -0.22
** Constraint: Eqn-11
*Equation
4
MASTERNODE8, 2, 1.
MASTERNODE1, 2, -1.
CONSTRAINTSDRIVER1, 1, -2.
CONSTRAINTSDRIVER5, 1, -0.22
** Constraint: Eqn-12
*Equation
3
MASTERNODE3, 2, 1.
MASTERNODE1, 2, -1.
CONSTRAINTSDRIVER1, 1, -2.
** Constraint: Eqn-13
*Equation
3
MASTERNODE4, 2, 1.
MASTERNODE1, 2, -1.
CONSTRAINTSDRIVER1, 1, -2.
** Constraint: Eqn-14
*Equation
2
MASTERNODE2, 2, 1.
MASTERNODE1, 2, -1.
** Constraint: Eqn-15
*Equation
4
MASTERNODE6, 1, 1.
MASTERNODE1, 1, -1.
CONSTRAINTSDRIVER4, 1, -0.22
CONSTRAINTSDRIVER0, 1, -2.
** Constraint: Eqn-16
*Equation
3
MASTERNODE5, 1, 1.
MASTERNODE1, 1, -1.
CONSTRAINTSDRIVER4, 1, -0.22
** Constraint: Eqn-17
*Equation
4
MASTERNODE8, 1, 1.
MASTERNODE1, 1, -1.
CONSTRAINTSDRIVER3, 1, -2.
CONSTRAINTSDRIVER4, 1, -0.22
** Constraint: Eqn-18
*Equation
3
MASTERNODE4, 1, 1.
MASTERNODE1, 1, -1.
CONSTRAINTSDRIVER3, 1, -2.
** Constraint: Eqn-19
*Equation
5
MASTERNODE7, 1, 1.
MASTERNODE1, 1, -1.
CONSTRAINTSDRIVER0, 1, -2.
CONSTRAINTSDRIVER4, 1, -0.22
CONSTRAINTSDRIVER3, 1, -2.
** Constraint: Eqn-20
*Equation
4
MASTERNODE3, 1, 1.
MASTERNODE1, 1, -1.
CONSTRAINTSDRIVER0, 1, -2.
CONSTRAINTSDRIVER3, 1, -2.
** Constraint: Eqn-21
*Equation
3
MASTERNODE2, 1, 1.
MASTERNODE1, 1, -1.
CONSTRAINTSDRIVER0, 1, -2.
*End Assembly
**
** MATERIALS
**
** ***************
** * MATERIALS ***
** ***************
*Material, name=MAT0
*Elastic
 3e+09, 0.2
*Expansion
 6.5e-06,
*Material, name=MAT1
*Elastic, type=ENGINEERING CONSTANTS
 2e+11, 1e+10, 1e+10,   0.3,   0.4,   0.4, 5e+09, 5e+09
 5e+09,
*Expansion, type=ORTHO
 -2e-07, 3e-06, 3e-06
**
** BOUNDARY CONDITIONS
**
** Name: Disp-BC-1 Type: Displacement/Rotation
*Boundary
MASTERNODE1, 1, 1
** Name: Disp-BC-2 Type: Displacement/Rotation
*Boundary
MASTERNODE1, 2, 2
** Name: Disp-BC-3 Type: Displacement/Rotation
*Boundary
MASTERNODE1, 3, 3
**
** PREDEFINED FIELDS
**
** Name: Field-1   Type: Temperature
*Initial Conditions, type=TEMPERATURE
ALLNODES, 0.
** ----------------------------------------------------------------
**
** STEP: Isothermallinearperturbationstep
**
*Step, name=Isothermallinearperturbationstep, nlgeom=NO, perturbation
Elastic material property computation
*Static
**
** OUTPUT REQUESTS
**
**
** FIELD OUTPUT: F-Output-1
**
*Output, field
*Element Output, directions=YES
S,
**
** FIELD OUTPUT: F-Output-2
**
*Node Output, nset=CONSTRAINTSDRIVER0
U,
**
** FIELD OUTPUT: F-Output-3
**
*Node Output, nset=CONSTRAINTSDRIVER1
U,
**
** FIELD OUTPUT: F-Output-4
**
*Node Output, nset=CONSTRAINTSDRIVER2
U,
**
** FIELD OUTPUT: F-Output-5
**
*Node Output, nset=CONSTRAINTSDRIVER3
U,
**
** FIELD OUTPUT: F-Output-7
**
*Node Output, nset=CONSTRAINTSDRIVER4
U,
**
** FIELD OUTPUT: F-Output-6
**
*Node Output, nset=CONSTRAINTSDRIVER5
U,
*Output, history, frequency=0
**
** LOAD CASES
**
*Load Case, name=LOAD0
** Name: Disp-BC-4 Type: Displacement/Rotation   Scale factor: 1
*Boundary, op=NEW
MASTERNODE1, 1, 1
** Name: Disp-BC-5 Type: Displacement/Rotation   Scale factor: 1
*Boundary, op=NEW
MASTERNODE1, 2, 2
** Name: Disp-BC-6 Type: Displacement/Rotation   Scale factor: 1
*Boundary, op=NEW
MASTERNODE1, 3, 3
*End Load Case
*Load Case, name=LOAD1
** Name: Disp-BC-7 Type: Displacement/Rotation   Scale factor: 1
*Boundary, op=NEW
MASTERNODE1, 1, 1
** Name: Disp-BC-8 Type: Displacement/Rotation   Scale factor: 1
*Boundary, op=NEW
MASTERNODE1, 2, 2
** Name: Disp-BC-9 Type: Displacement/Rotation   Scale factor: 1
*Boundary, op=NEW
MASTERNODE1, 3, 3
*End Load Case
*Load Case, name=LOAD2
** Name: Disp-BC-10 Type: Displacement/Rotation   Scale factor: 1
*Boundary, op=NEW
MASTERNODE1, 1, 1
** Name: Disp-BC-11 Type: Displacement/Rotation   Scale factor: 1
*Boundary, op=NEW
MASTERNODE1, 2, 2
** Name: Disp-BC-12 Type: Displacement/Rotation   Scale factor: 1
*Boundary, op=NEW
MASTERNODE1, 3, 3
*End Load Case
*Load Case, name=LOAD3
** Name: Disp-BC-13 Type: Displacement/Rotation   Scale factor: 1
*Boundary, op=NEW
MASTERNODE1, 1, 1
** Name: Disp-BC-14 Type: Displacement/Rotation   Scale factor: 1
*Boundary, op=NEW
MASTERNODE1, 2, 2
** Name: Disp-BC-15 Type: Displacement/Rotation   Scale factor: 1
*Boundary, op=NEW
MASTERNODE1, 3, 3
*End Load Case
*Load Case, name=LOAD4
** Name: Disp-BC-16 Type: Displacement/Rotation   Scale factor: 1
*Boundary, op=NEW
MASTERNODE1, 1, 1
** Name: Disp-BC-17 Type: Displacement/Rotation   Scale factor: 1
*Boundary, op=NEW
MASTERNODE1, 2, 2
** Name: Disp-BC-18 Type: Displacement/Rotation   Scale factor: 1
*Boundary, op=NEW
MASTERNODE1, 3, 3
*End Load Case
*Load Case, name=LOAD5
** Name: Disp-BC-19 Type: Displacement/Rotation   Scale factor: 1
*Boundary, op=NEW
MASTERNODE1, 1, 1
** Name: Disp-BC-20 Type: Displacement/Rotation   Scale factor: 1
*Boundary, op=NEW
MASTERNODE1, 2, 2
** Name: Disp-BC-21 Type: Displacement/Rotation   Scale factor: 1
*Boundary, op=NEW
MASTERNODE1, 3, 3
*End Load Case
*End Step
** ----------------------------------------------------------------
**
** STEP: Thermomechanicalstep
**
*Step, name=Thermomechanicalstep, nlgeom=NO, perturbation
Coefficient of Thermal Expansion computation
*Static
**
** PREDEFINED FIELDS
**
** Name: Field-2   Type: Temperature
*Temperature
ALLNODES, 1.
**
** OUTPUT REQUESTS
**
**
** FIELD OUTPUT: F-Output-8
**
*Output, field
*Element Output, directions=YES
S,
**
** FIELD OUTPUT: F-Output-9
**
*Node Output, nset=CONSTRAINTSDRIVER0
U,
**
** FIELD OUTPUT: F-Output-10
**
*Node Output, nset=CONSTRAINTSDRIVER1
U,
**
** FIELD OUTPUT: F-Output-11
**
*Node Output, nset=CONSTRAINTSDRIVER2
U,
*Output, history, frequency=0
*End Step
